! Published historical command trace; temporary table path anonymized.
! APDL log script generated using PyMAPDL (ansys.mapdl.core 0.74.1)
FINISH
/POST26
NUMVAR,200
FINISH
/INQUIRE,,DIRECTORY,,
/SHOW,PNG,,,
/NERR,,,-1
/INQUIRE,,DIRECTORY,,
/INQUIRE,,DIRECTORY,,
/CLE,NOSTART
/CLE,NOSTART
/OUT,_input_tmp_xpbthdkbiy_.out
/INP,'data/geometry/LatheCutter.anf'
/OUT,/INQUIRE,,DIRECTORY,,
FINISH
*STATUS,,,,,,,,,,,,
*STATUS,_PRM,,,,,,,,,,,
*STATUS,PRM_,,,,,,,,,,,
/UNITS,BIN,,,,,,,,
/TITLE,Lathe Cutter - official baseline reproduction
/PREP7
MP,EX,1,10000000.0,,,,
MP,NUXY,1,0.27,,,,
ET,1,187,,,,,,,
SMRTSIZE,0,,,,,,,,,,
ESIZE,0.007,
MSHAPE,1,3D
MSHKEY,0
AESIZE,14,0.0007
VMESH,1,,
*GET,__floatparameter__,NODE,,COUNT,,,,,,,
*GET,__floatparameter__,ELEM,,COUNT,,,,,,,
DA,11,SYMM,,
DA,16,SYMM,,
DA,9,SYMM,,
DA,10,SYMM,,
CSKP,11,0,2,1,13,,
CSYS,0
CSYS,1
*DIM,MY_PRESS,TABLE,81,1,,X,,,11
*TREAD,MY_PRESS,__runtime_pressure_table__.txt,,,1
ASEL,S,AREA,,14,,,
*GET,__floatparameter__,AREA,,COUNT,,,,,,,
NSLA,S,1
*GET,__floatparameter__,NODE,,COUNT,,,,,,,
SF,ALL,PRES,%MY_PRESS%,,,
ALLSEL,,
FINISH
/SOLU
NLGEOM,ON
SAVE,,,,
SOLVE,
FINISH
/POST1
SET,LAST,,,,,,,
ALLSEL,,
CSYS,0
RSYS,0
/FORMAT,10,E,22,14
PRRSOL,F
CMLIST,,,
CM,__cmp_kpajyoe__,KP,,
CM,__cmp_lineajyoe__,LINE,,
CM,__cmp_areaajyoe__,AREA,,
CM,__cmp_voluajyoe__,VOLU,,
CM,__cmp_nodeajyoe__,NODE,,
CM,__cmp_elemajyoe__,ELEM,,
NSLE,S,,
*GET,__floatparameter__,ELEM,,COUNT,,,,,,,
ALLSEL,,
CMSEL,None,,
CMSEL,a,__cmp_kpajyoe__,KP
KSEL,S,,,__cmp_kpajyoe__,,,
*GET,__floatparameter__,KP,,COUNT,,,,,,,
CMDELE,__cmp_kpajyoe__
CMSEL,a,__cmp_lineajyoe__,LINE
LSEL,S,,,__cmp_lineajyoe__,,,
*GET,__floatparameter__,LINE,,COUNT,,,,,,,
*GET,__floatparameter__,LINE,,COUNT,,,,,,,
CMDELE,__cmp_lineajyoe__
CMSEL,a,__cmp_areaajyoe__,AREA
ASEL,S,,,__cmp_areaajyoe__,,,
*GET,__floatparameter__,AREA,,COUNT,,,,,,,
CMDELE,__cmp_areaajyoe__
CMSEL,a,__cmp_voluajyoe__,VOLU
VSEL,S,,,__cmp_voluajyoe__,,,
*GET,__floatparameter__,VOLU,,COUNT,,,,,,,
CMDELE,__cmp_voluajyoe__
CMSEL,a,__cmp_nodeajyoe__,NODE
NSEL,S,,,__cmp_nodeajyoe__,,,
CMDELE,__cmp_nodeajyoe__
CMSEL,a,__cmp_elemajyoe__,ELEM
ESEL,S,,,__cmp_elemajyoe__,,,
*GET,__floatparameter__,ELEM,,COUNT,,,,,,,
CMDELE,__cmp_elemajyoe__
*GET,__floatparameter__,ELEM,,COUNT,,,,,,,
SAVE,,,,
/INQUIRE,,DIRECTORY,,
FINISH
