! Published historical command trace; temporary table path anonymized.
! APDL log script generated using PyMAPDL (ansys.mapdl.core 0.74.1)
FINISH
/POST26
NUMVAR,200
FINISH
/INQUIRE,,DIRECTORY,,
/SHOW,PNG,,,
/NERR,,,-1
/INQUIRE,,DIRECTORY,,
/INQUIRE,,DIRECTORY,,
/CLE,NOSTART
/CLE,NOSTART
/OUT,_input_tmp_zuwswnvknb_.out
/INP,'data/geometry/LatheCutter.anf'
/OUT,/INQUIRE,,DIRECTORY,,
FINISH
*STATUS,,,,,,,,,,,,
*STATUS,_PRM,,,,,,,,,,,
*STATUS,PRM_,,,,,,,,,,,
/UNITS,BIN,,,,,,,,
/TITLE,Lathe Cutter - official baseline reproduction
/PREP7
MP,EX,1,10000000.0,,,,
MP,NUXY,1,0.27,,,,
ET,1,187,,,,,,,
SMRTSIZE,0,,,,,,,,,,
ESIZE,0.01,
MSHAPE,1,3D
MSHKEY,0
AESIZE,14,0.001
VMESH,1,,
*GET,__floatparameter__,NODE,,COUNT,,,,,,,
*GET,__floatparameter__,ELEM,,COUNT,,,,,,,
DA,11,SYMM,,
DA,16,SYMM,,
DA,9,SYMM,,
DA,10,SYMM,,
CSKP,11,0,2,1,13,,
CSYS,0
CSYS,1
*DIM,MY_PRESS,TABLE,81,1,,X,,,11
*TREAD,MY_PRESS,__runtime_pressure_table__.txt,,,1
ASEL,S,AREA,,14,,,
*GET,__floatparameter__,AREA,,COUNT,,,,,,,
NSLA,S,1
*GET,__floatparameter__,NODE,,COUNT,,,,,,,
SF,ALL,PRES,%MY_PRESS%,,,
ALLSEL,,
FINISH
/SOLU
NLGEOM,ON
SAVE,,,,
SOLVE,
FINISH
/POST1
SET,LAST,,,,,,,
ALLSEL,,
CSYS,0
RSYS,0
/FORMAT,10,E,22,14
PRRSOL,F
CMLIST,,,
CM,__cmp_kpaeunr__,KP,,
CM,__cmp_lineaeunr__,LINE,,
CM,__cmp_areaaeunr__,AREA,,
CM,__cmp_voluaeunr__,VOLU,,
CM,__cmp_nodeaeunr__,NODE,,
CM,__cmp_elemaeunr__,ELEM,,
NSLE,S,,
*GET,__floatparameter__,ELEM,,COUNT,,,,,,,
ALLSEL,,
CMSEL,None,,
CMSEL,a,__cmp_kpaeunr__,KP
KSEL,S,,,__cmp_kpaeunr__,,,
*GET,__floatparameter__,KP,,COUNT,,,,,,,
CMDELE,__cmp_kpaeunr__
CMSEL,a,__cmp_lineaeunr__,LINE
LSEL,S,,,__cmp_lineaeunr__,,,
*GET,__floatparameter__,LINE,,COUNT,,,,,,,
*GET,__floatparameter__,LINE,,COUNT,,,,,,,
CMDELE,__cmp_lineaeunr__
CMSEL,a,__cmp_areaaeunr__,AREA
ASEL,S,,,__cmp_areaaeunr__,,,
*GET,__floatparameter__,AREA,,COUNT,,,,,,,
CMDELE,__cmp_areaaeunr__
CMSEL,a,__cmp_voluaeunr__,VOLU
VSEL,S,,,__cmp_voluaeunr__,,,
*GET,__floatparameter__,VOLU,,COUNT,,,,,,,
CMDELE,__cmp_voluaeunr__
CMSEL,a,__cmp_nodeaeunr__,NODE
NSEL,S,,,__cmp_nodeaeunr__,,,
CMDELE,__cmp_nodeaeunr__
CMSEL,a,__cmp_elemaeunr__,ELEM
ESEL,S,,,__cmp_elemaeunr__,,,
*GET,__floatparameter__,ELEM,,COUNT,,,,,,,
CMDELE,__cmp_elemaeunr__
*GET,__floatparameter__,ELEM,,COUNT,,,,,,,
SAVE,,,,
/INQUIRE,,DIRECTORY,,
FINISH
