! Published historical command trace; temporary table path anonymized.
! APDL log script generated using PyMAPDL (ansys.mapdl.core 0.74.1)
FINISH
/POST26
NUMVAR,200
FINISH
/INQUIRE,,DIRECTORY,,
/SHOW,PNG,,,
/NERR,,,-1
/INQUIRE,,DIRECTORY,,
/INQUIRE,,DIRECTORY,,
/CLE,NOSTART
/CLE,NOSTART
/OUT,_input_tmp_nyzyewvodq_.out
/INP,'data/geometry/LatheCutter.anf'
/OUT,/INQUIRE,,DIRECTORY,,
FINISH
*STATUS,,,,,,,,,,,,
*STATUS,_PRM,,,,,,,,,,,
*STATUS,PRM_,,,,,,,,,,,
/UNITS,BIN,,,,,,,,
/TITLE,Lathe Cutter - official baseline reproduction
/PREP7
MP,EX,1,10000000.0,,,,
MP,NUXY,1,0.27,,,,
ET,1,285,,,,,,,
SMRTSIZE,4,,,,,,,,,,
AESIZE,14,0.0025
VMESH,1,,
*GET,__floatparameter__,NODE,,COUNT,,,,,,,
*GET,__floatparameter__,ELEM,,COUNT,,,,,,,
DA,11,SYMM,,
DA,16,SYMM,,
DA,9,SYMM,,
DA,10,SYMM,,
CSKP,11,0,2,1,13,,
CSYS,0
CSYS,1
*DIM,MY_PRESS,TABLE,10,1,,X,,,11
*TREAD,MY_PRESS,__runtime_pressure_table__.txt,,,1
ASEL,S,AREA,,14,,,
*GET,__floatparameter__,AREA,,COUNT,,,,,,,
NSLA,S,1
*GET,__floatparameter__,NODE,,COUNT,,,,,,,
SF,ALL,PRES,%MY_PRESS%,,,
ALLSEL,,
FINISH
/SOLU
NLGEOM,ON
SAVE,,,,
SOLVE,
FINISH
/POST1
SET,LAST,,,,,,,
ALLSEL,,
CSYS,0
RSYS,0
/FORMAT,10,E,22,14
PRRSOL,F
CMLIST,,,
CM,__cmp_kpxzwjz__,KP,,
CM,__cmp_linexzwjz__,LINE,,
CM,__cmp_areaxzwjz__,AREA,,
CM,__cmp_voluxzwjz__,VOLU,,
CM,__cmp_nodexzwjz__,NODE,,
CM,__cmp_elemxzwjz__,ELEM,,
NSLE,S,,
*GET,__floatparameter__,ELEM,,COUNT,,,,,,,
ALLSEL,,
CMSEL,None,,
CMSEL,a,__cmp_kpxzwjz__,KP
KSEL,S,,,__cmp_kpxzwjz__,,,
*GET,__floatparameter__,KP,,COUNT,,,,,,,
CMDELE,__cmp_kpxzwjz__
CMSEL,a,__cmp_linexzwjz__,LINE
LSEL,S,,,__cmp_linexzwjz__,,,
*GET,__floatparameter__,LINE,,COUNT,,,,,,,
*GET,__floatparameter__,LINE,,COUNT,,,,,,,
CMDELE,__cmp_linexzwjz__
CMSEL,a,__cmp_areaxzwjz__,AREA
ASEL,S,,,__cmp_areaxzwjz__,,,
*GET,__floatparameter__,AREA,,COUNT,,,,,,,
CMDELE,__cmp_areaxzwjz__
CMSEL,a,__cmp_voluxzwjz__,VOLU
VSEL,S,,,__cmp_voluxzwjz__,,,
*GET,__floatparameter__,VOLU,,COUNT,,,,,,,
CMDELE,__cmp_voluxzwjz__
CMSEL,a,__cmp_nodexzwjz__,NODE
NSEL,S,,,__cmp_nodexzwjz__,,,
CMDELE,__cmp_nodexzwjz__
CMSEL,a,__cmp_elemxzwjz__,ELEM
ESEL,S,,,__cmp_elemxzwjz__,,,
*GET,__floatparameter__,ELEM,,COUNT,,,,,,,
CMDELE,__cmp_elemxzwjz__
*GET,__floatparameter__,ELEM,,COUNT,,,,,,,
SAVE,,,,
/INQUIRE,,DIRECTORY,,
FINISH
